# Nanocrystals.

# REQUIRES:
# A folder named "RUN" to store configurations.
# A folder named "Restart" to store the restart binary files.
# An input file to start the simulation (default name: start.data)

################################################################################
# Variables.
## MATH.
variable sr_two         equal   $(2^(1/6.))     		                        # Parameter is used in cutoffs.
variable kb             equal   0.001987204259

## NUMBER OF STEPS OF RUNS.
variable tnvt		    equal 	500000				                            # NVT run steps.

## INFORMATION PRINTING PERIODS.
variable thermodump     equal   1e3				                                # Thermo info dump period.
variable trajdump       equal   5000		    		                        # Config info dump period.
variable trestart       equal   100000		    		                        # Restart configuration saving period.

## SIMULATION PARAMETERS
variable sigPb          equal   3.29                                            # sigPb charge [Amstrong].
variable sigSe          equal   4.36                                            # sigSe charge [Amstrong].
variable epsPb          equal   30.0*${kb}                                      # energy [Kelvin] [epsPb/kB].
variable epsSe          equal   45.3*${kb}                                      # energy [Kelvin] [epsSe/kB].
variable rcut           equal   10.0                                            # Cutoff [Amstrong].
variable tstep          equal   2       			                            # Integration time step [femtoseconds].

## THERMODYNAMIC PARAMETERS.
variable mytemp         index 	300                                             # Temperature [Kelvin].
variable mypress	    index   1.0                                             # Pressure [Atmospheres].
variable Tdamping	    equal   100*${tstep}
variable Pdamping       equal   10000

## SEEDS
variable seed		    index	11573				                            # Seed for creation of velocities.

## STRINGS
variable fname 		    string 	start.data
variable thermofile     string  thermo.dat							            # Name of the file with thermodynamic infos for npt equilibration phase.
variable simname 	    string 	NanoCrys_${mytemp}				                # Name of this simulation.

################################################################################
# Initialization
units                   real
boundary                p p f
atom_style              charge

## Starting file.
read_data       	    ${fname}
#read_restart		    ${fname}
reset_timestep          0

## Masses
mass			        1 207.2
mass                    2 78.96

## Groups
group                   Pb type 1
group                   Se type 2
set group               Pb charge 1.29
set group               Se charge -1.29

#####################################################
# Settings

## Interaction.
pair_style		        lj/cut/coul/long 12.0
dielectric              1.0

pair_coeff		        1 1 ${epsPb} ${sigPb} ${rcut}                           # Pb.
pair_coeff		        2 2 ${epsSe} ${sigSe} ${rcut}                           # Se.
pair_modify             mix arithmetic                                          # Lennard-Berthelot rule.
kspace_style            pppm 1e-5
kspace_modify 		    slab nozforce

neighbor                1.0 bin
neigh_modify            delay 0 every 1 check yes
#####################################################
# NPT or NVT run

## Nose-Hoover simulations.
## Initial velocities from Maxwell-Boltzmann distribution.
velocity     		    all create ${mytemp} ${seed} dist gaussian
fix                     thermoNose all npt temp ${mytemp} ${mytemp} ${Tdamping} x ${mypress} ${mypress} ${Pdamping} y ${mypress} ${mypress} ${Pdamping} # NPT Simulations.
#fix			        thermoNose all nvt temp ${mytemp} ${mytemp} ${Tdamping}                                                                         # NVT Simulations.

set group               all vz 0.0
fix                     planarForce all setforce NULL NULL 0.0

print 			        'SETTING RUN...'

#####################################################
# Observables.

## Variables for use in fix print.
variable step           equal step
variable temp           equal temp
variable ke             equal ke
variable pe             equal pe

thermo_style            custom step ke pe temp press
#thermo_modify          norm no
thermo                  ${thermodump}

timestep                ${tstep}

fix                     dummy all print ${thermodump} "${step} ${ke} ${pe} ${temp}" file ${thermofile} screen no title "#1:step 2:ke 3:pe 4:temp"

#####################################################
# Save information.
dump                    conf all custom ${trajdump} RUN/${simname}_* id type q x y z
dump_modify             conf format line "%d %d %.2f %.6f %.6f %.6f"                    # Format.
dump_modify             conf pbc yes                                                    # Positions inside of the box.
dump_modify             conf sort id                                                    # Sort the list with respect to id.
dump_modify		        conf pad 10

restart                 ${trestart} Restart/${simname}.*.restart

run		                ${tnvt}

print 			        'RUN COMPLETE'

#####################################################
# WRITE FINAL INFORMATIONS

write_data      	    data.${simname}
write_restart		    Restart/restart.${simname}
